Wed Apr  1 06:32:11 PM UTC 2026
$PROBLEM    run15 + but CrCL using FFM. Don't estimate FFM~V1/V2
$INPUT      ID OCC TIME EVID MDV DV AMT LENGTH RATE DROP DROP SEX AGE
            WEIGHT HEIGHT CREAT LOGCR LOGWT70 FFM LOGFFM70
$DATA      nmdata_20230216_1.csv IGNORE=@
$SUBROUTINE ADVAN3 TRANS4
$PK
CRCL = (140-AGE) * FFM * (0.85**SEX) / (72*CREAT)
TVCL = THETA(1) * (FFM/70)**THETA(7) * (CRCL/100)**THETA(9)
CL = TVCL * EXP(ETA(1))
TVV1 = THETA(2) * (FFM/70)**THETA(8)
V1 = TVV1 * EXP(ETA(2))
TVQ = THETA(3) * (FFM/70)**THETA(7)
Q = TVQ
TVV2 = THETA(4) * (FFM/70)**THETA(8)
V2 = TVV2 * EXP(ETA(3))
S1 = V1

;$DES
;DADT(1) = -(CL/V1)*A(1) + (Q/V2)*A(2) - (Q/V1)*A(1)
;DADT(2) =               - (Q/V2)*A(2) + (Q/V1)*A(1)
;DADT(3) =  (A(1)/V1)

$ERROR
CONC = A(1)/S1
IPRED = CONC
PROP = THETA(5)
ADD = THETA(6)
W = SQRT(IPRED**2 * PROP**2 + ADD**2)
IRES = DV - IPRED
IWRES = IRES/W
Y = IPRED + W*ERR(1)
AUC = A(3)

$THETA  (0.1,9) ; CL
 (1,60) ; V1
 (0.1,1) ; Q
 (1,100) ; V2
 (0,0.2) ; prop error
 (0,0.5) ; add error
 0 FIX ; allo CL/Q
 1 FIX ; allo V1/V2
 (0.01,0.3) ; CRCL ~ CL
$OMEGA  BLOCK(3)
 0.2
 0.01 0.2
 0.01 0.01 0.2
$SIGMA  1  FIX
$ESTIMATION METHOD=1 INTER MAXEVAL=9999 PRINT=5 POSTHOC NOABORT
$COVARIANCE UNCOND

NM-TRAN MESSAGES
 WARNINGS AND ERRORS (IF ANY) FOR PROBLEM    1
 (WARNING  2) NM-TRAN INFERS THAT THE DATA ARE POPULATION.
Note: Analytical 2nd Derivatives are constructed in FSUBS but are never used.
      You may insert $ABBR DERIV2=NO after the first $PROB to save FSUBS construction and compilation time

1NONLINEAR MIXED EFFECTS MODEL PROGRAM (NONMEM) VERSION 7.5.1
 ORIGINALLY DEVELOPED BY STUART BEAL, LEWIS SHEINER, AND ALISON BOECKMANN
 CURRENT DEVELOPERS ARE ROBERT BAUER, ICON DEVELOPMENT SOLUTIONS,
 AND ALISON BOECKMANN. IMPLEMENTATION, EFFICIENCY, AND STANDARDIZATION
 PERFORMED BY NOUS INFOSYSTEMS.
 PROBLEM NO.:         1
 run15 + but CrCL using FFM. Don't estimate FFM~V1/V2
 TOT. NO. OF OBS RECS:      274
 TOT. NO. OF INDIVIDUALS:      100
 TWO COMPARTMENT MODEL (ADVAN3)
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 #TBLN:      1
 #METH: First Order Conditional Estimation with Interaction
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
 #TERM:
0MINIMIZATION TERMINATED
 DUE TO MAX. NO. OF FUNCTION EVALUATIONS EXCEEDED
 NO. OF FUNCTION EVALUATIONS USED:    10003
 NO. OF SIG. DIGITS UNREPORTABLE

 ETABAR IS THE ARITHMETIC MEAN OF THE ETA-ESTIMATES,
 AND THE P-VALUE IS GIVEN FOR THE NULL HYPOTHESIS THAT THE TRUE MEAN IS 0.

 ETABAR:        -3.0450E-03 -7.4135E-03 -1.1031E-02
 SE:             2.3525E-02  2.5097E-02  5.0020E-02
 N:                      84          84          84

 P VAL.:         8.9701E-01  7.6769E-01  8.2546E-01

 ETASHRINKSD(%)  1.8878E+01  2.1919E+01  3.7971E+01
 ETASHRINKVR(%)  3.4193E+01  3.9034E+01  6.1524E+01
 EBVSHRINKSD(%)  1.9388E+01  2.2005E+01  3.6916E+01
 EBVSHRINKVR(%)  3.5017E+01  3.9167E+01  6.0204E+01
 RELATIVEINF(%)  4.1649E+01  2.5825E+01  2.6607E+01
 EPSSHRINKSD(%)  2.0903E+01
 EPSSHRINKVR(%)  3.7436E+01


 TOTAL DATA POINTS NORMALLY DISTRIBUTED (N):          274
 N*LOG(2PI) CONSTANT TO OBJECTIVE FUNCTION:    503.57831619616064
 OBJECTIVE FUNCTION VALUE WITHOUT CONSTANT:    994.28126074413569
 OBJECTIVE FUNCTION VALUE WITH CONSTANT:       1497.8595769402964
 REPORTED OBJECTIVE FUNCTION DOES NOT CONTAIN CONSTANT

 TOTAL EFFECTIVE ETAS (NIND*NETA):                           252


 #TERE:
 Elapsed estimation  time in seconds:    94.82
 Elapsed covariance  time in seconds:     2.54
 Elapsed postprocess time in seconds:     0.00

 ********************               FIRST ORDER CONDITIONAL ESTIMATION WITH INTERACTION              ********************
 #OBJT:**************                       MINIMUM VALUE OF OBJECTIVE FUNCTION                      ********************
 #OBJV:********************************************      994.281       **************************************************

 ********************               FIRST ORDER CONDITIONAL ESTIMATION WITH INTERACTION              ********************
 ********************                             FINAL PARAMETER ESTIMATE                           ********************

 THETA - VECTOR OF FIXED EFFECTS PARAMETERS   *********
         TH 1      TH 2      TH 3      TH 4      TH 5      TH 6      TH 7      TH 8      TH 9
         5.36E+00  7.07E+01  5.29E+00  6.42E+01  1.35E-01  1.11E+00  0.00E+00  1.00E+00  8.67E-01

 OMEGA - COV MATRIX FOR RANDOM EFFECTS - ETAS  ********
         ETA1      ETA2      ETA3
 ETA1
+        7.06E-02
 ETA2
+        5.29E-02  8.68E-02
 ETA3
+        1.45E-02  7.87E-02  5.46E-01

 SIGMA - COV MATRIX FOR RANDOM EFFECTS - EPSILONS  ****
         EPS1
 EPS1
+        1.00E+00

 OMEGA - CORR MATRIX FOR RANDOM EFFECTS - ETAS  *******
         ETA1      ETA2      ETA3
 ETA1
+        2.66E-01
 ETA2
+        6.75E-01  2.95E-01
 ETA3
+        7.36E-02  3.61E-01  7.39E-01

 SIGMA - CORR MATRIX FOR RANDOM EFFECTS - EPSILONS  ***
         EPS1
 EPS1
+        1.00E+00

 ********************               FIRST ORDER CONDITIONAL ESTIMATION WITH INTERACTION              ********************
 ********************                            STANDARD ERROR OF ESTIMATE                          ********************

 THETA - VECTOR OF FIXED EFFECTS PARAMETERS   *********
         TH 1      TH 2      TH 3      TH 4      TH 5      TH 6      TH 7      TH 8      TH 9
         2.25E-01  6.78E+00  1.54E+00  7.49E+00  3.31E-02  9.55E-01 ......... .........  5.25E-02

 OMEGA - COV MATRIX FOR RANDOM EFFECTS - ETAS  ********
         ETA1      ETA2      ETA3
 ETA1
+        1.56E-02
 ETA2
+        2.34E-02  2.92E-02
 ETA3
+        2.18E-02  4.45E-02  3.00E-01

 SIGMA - COV MATRIX FOR RANDOM EFFECTS - EPSILONS  ****
         EPS1
 EPS1
+       .........

 OMEGA - CORR MATRIX FOR RANDOM EFFECTS - ETAS  *******
         ETA1      ETA2      ETA3
 ETA1
+        2.94E-02
 ETA2
+        2.32E-01  4.95E-02
 ETA3
+        1.11E-01  2.54E-01  2.03E-01

 SIGMA - CORR MATRIX FOR RANDOM EFFECTS - EPSILONS  ***
         EPS1
 EPS1
+       .........

 ********************               FIRST ORDER CONDITIONAL ESTIMATION WITH INTERACTION              ********************
 ********************                          COVARIANCE MATRIX OF ESTIMATE                         ********************

            TH 1      TH 2      TH 3      TH 4      TH 5      TH 6      TH 7      TH 8      TH 9      OM11      OM12      OM13
             OM22      OM23      OM33      SG11
 TH 1
+        5.08E-02
 TH 2
+        5.66E-01  4.60E+01
 TH 3
+       -1.03E-01 -9.16E+00  2.37E+00
 TH 4
+       -3.29E-01  1.13E+00  1.86E+00  5.60E+01
 TH 5
+       -9.61E-04 -8.10E-02  2.41E-02  1.24E-02  1.09E-03
 TH 6
+        6.38E-02  2.10E+00 -4.96E-01  1.21E+00 -2.68E-02  9.12E-01
 TH 7
+       ......... ......... ......... ......... ......... ......... .........
 TH 8
+       ......... ......... ......... ......... ......... ......... ......... .........
 TH 9
+        4.24E-04  1.06E-01 -2.47E-02  1.04E-01 -8.02E-04  2.95E-02 ......... .........  2.75E-03
 OM11
+       -8.57E-05  8.73E-03  1.41E-04  2.70E-02 -2.65E-04  1.02E-02 ......... .........  3.40E-04  2.43E-04
 OM12
+        1.99E-03  2.74E-03  7.87E-04  3.42E-02 -2.35E-04  1.45E-02 ......... .........  3.38E-04  2.23E-04  5.50E-04
 OM13
+       -8.76E-05 -2.62E-03  1.70E-04 -1.01E-02 -1.12E-04  5.65E-03 ......... ......... -4.41E-05  1.23E-04  2.60E-04  4.73E-04
 OM22
+        1.38E-03  2.45E-02 -1.83E-03  2.57E-02 -4.26E-04  1.75E-02 ......... .........  7.00E-04  3.25E-04  3.95E-04  2.22E-04
          8.52E-04
 OM23
+       -2.53E-03 -2.06E-01  5.21E-02  3.37E-02  4.60E-04 -6.72E-03 ......... ......... -1.80E-04  1.58E-04  9.79E-05  2.95E-04
          3.61E-04  1.98E-03
 OM33
+        1.47E-02  1.41E+00 -3.36E-01 -2.05E-01 -1.09E-03  1.53E-02 ......... .........  1.04E-03 -4.30E-04 -4.57E-04 -4.59E-04
         -1.10E-03 -5.83E-03  8.99E-02
 SG11
+       ......... ......... ......... ......... ......... ......... ......... ......... ......... ......... ......... .........
         ......... ......... ......... .........

 ********************               FIRST ORDER CONDITIONAL ESTIMATION WITH INTERACTION              ********************
 ********************                          CORRELATION MATRIX OF ESTIMATE                        ********************

            TH 1      TH 2      TH 3      TH 4      TH 5      TH 6      TH 7      TH 8      TH 9      OM11      OM12      OM13
             OM22      OM23      OM33      SG11
 TH 1
+        2.25E-01
 TH 2
+        3.71E-01  6.78E+00
 TH 3
+       -2.97E-01 -8.77E-01  1.54E+00
 TH 4
+       -1.95E-01  2.23E-02  1.62E-01  7.49E+00
 TH 5
+       -1.29E-01 -3.61E-01  4.73E-01  5.00E-02  3.31E-02
 TH 6
+        2.97E-01  3.24E-01 -3.37E-01  1.69E-01 -8.49E-01  9.55E-01
 TH 7
+       ......... ......... ......... ......... ......... ......... .........
 TH 8
+       ......... ......... ......... ......... ......... ......... ......... .........
 TH 9
+        3.59E-02  2.99E-01 -3.05E-01  2.65E-01 -4.62E-01  5.88E-01 ......... .........  5.25E-02
 OM11
+       -2.44E-02  8.25E-02  5.88E-03  2.31E-01 -5.14E-01  6.86E-01 ......... .........  4.16E-01  1.56E-02
 OM12
+        3.76E-01  1.72E-02  2.18E-02  1.95E-01 -3.03E-01  6.46E-01 ......... .........  2.75E-01  6.11E-01  2.34E-02
 OM13
+       -1.79E-02 -1.78E-02  5.06E-03 -6.20E-02 -1.55E-01  2.72E-01 ......... ......... -3.87E-02  3.61E-01  5.10E-01  2.18E-02
 OM22
+        2.09E-01  1.24E-01 -4.08E-02  1.18E-01 -4.42E-01  6.29E-01 ......... .........  4.57E-01  7.15E-01  5.78E-01  3.49E-01
          2.92E-02
 OM23
+       -2.52E-01 -6.85E-01  7.61E-01  1.01E-01  3.13E-01 -1.58E-01 ......... ......... -7.74E-02  2.27E-01  9.40E-02  3.05E-01
          2.78E-01  4.45E-02
 OM33
+        2.18E-01  6.91E-01 -7.29E-01 -9.11E-02 -1.10E-01  5.34E-02 ......... .........  6.59E-02 -9.20E-02 -6.50E-02 -7.03E-02
         -1.26E-01 -4.37E-01  3.00E-01
 SG11
+       ......... ......... ......... ......... ......... ......... ......... ......... ......... ......... ......... .........
         ......... ......... ......... .........
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 Elapsed finaloutput time in seconds:     0.01
 #CPUT: Total CPU Time in Seconds,       97.543
